# Catalog rated load for a specified reliability and Weibull parameters
a_f := 1
F_D := 20000 N
x_D := 456
x_0 := 0.02
θ := 4.459
C_10 := 25500 N
b := 1.483
R_D := 0.95
a := 10/3
C_10 := a_f*F_D*[x_D/(x_0 + (θ - x_0)*(1 - R_D)^(1/b))]^(1/a) = [145670] N
