c
v_p := 0.292
v_g := 0.292
E_p := 207*10^3 MPa
E_g := 207*10^3 MPa
d_p := 0.096 m
d_g := 0.180 m
K_v := 1.994
Wt := 3433 N
ψ := 20*deg
F := 0.075 m
C_p := (1/(π*((1 - v_p^2)/E_p + (1 - v_g^2)/E_g)))^(1/2)
r_1 := d_p*sin(ψ)/2
r_2 := d_g*sin(ψ)/2
C_p = 189.779 sqrt(MPa)
r_1 = 0.016417 m
σ_c := -C_p*(K_v*Wt/(F*cos(ψ))*(1/r_1 + 1/r_2))^(1/2)
σ_c = -571.604 MPa
