# DE Goodman's
K_fs := 2.2
M_a := 675.30 N*m
M_m := 0 N*m
S_y := 420*10^6 N/m^2
S_ut := 560*10^6 N/m^2
S_e := 0.5*S_ut
d := 1.1 m
T_m := 340 N*m
K_f := 2.7
T_a := 0 N*m
n := 1/(16/(π*d^3)*((1/S_e)*((4*(K_f*M_a)^2) + (3*(K_fs*T_a)^2))^0.5 + 1/S_ut*[4*(K_f*M_m)^2 + 3*(K_fs*T_m)^2]^0.5))
n = [17039.7]
n := 2.5
d := (16*n/π*(1/S_e*(4*(K_f*M_a)^2 + 3*(K_fs*T_a)^2)^0.5 + 1/S_ut*(4*(K_f*M_m)^2 + 3*(K_fs*T_m)^2)^0.5))^(1/3)
d = 0.0580165 m
# DE Gerber
A := sqrt(4*(K_f*M_a)^2 + 3*(K_fs*T_a)^2)
B := sqrt(4*(K_f*M_m)^2 + 3*(K_fs*T_m)^2)
n := 1/(8*A/(π*d^3*S_e)*(1 + (1 + (2*B*S_e/(A*S_ut))^2)^0.5))
d := (8*n*A/(π*S_e)*(1 + (1 + (2*B*S_e/(A*S_ut))^2)^0.5))^(1/3)
# DE ASME ELLICPTIC
n := 1/(16/(π*d^3)*(4*(K_f*M_a/S_e)^2 + 3*(K_fs*T_a/S_e)^2 + 4*(K_f*M_m/S_y)^2 + 3*(K_fs*T_m/S_y)^2)^0.5)
n = 2.86484
d := (16*n/π*(4*(K_f*M_a/S_e)^2 + 3*(K_fs*T_a/S_e)^2 + 4*(K_f*M_m/S_y)^2 + 3*(K_fs*T_m/S_y)^2)^0.5)^(1/3)
d = 0.0580165 m
# DE  Soderberg
n := 1/(16/(π*d^3)*(1/S_e*(4*(K_f*M_a)^2 + 3*(K_fs*T_a)^2)^0.5 + 1/S_y*[4*(K_f*M_m)^2 + 3*(K_fs*T_m)^2]^0.5))
d := (16*n/π*(1/S_e*(4*(K_f*M_a)^2 + 3*(K_fs*T_a)^2)^0.5 + 1/S_y*(4*(K_f*M_m)^2 + 3*(K_fs*T_m)^2)^0.5))^(1/3)
