# for 1 to 1
k := 1
ψ := 20
N_p := 2*k/(3*sin(ψ*deg)^2)*(1 + sqrt(1 + 3*sin(ψ*deg)^2))
N_p = 12.3231
N_p := ceil(N_p)
N_p = 13
# for ratios greater than one
m := 5  # gear ratio
N_pm := 2*k/((1 + 2*m)*sin(ψ*deg)^2)*(m + sqrt(m^2 + (1 + 2*m)*sin(ψ*deg)^2))
N_pm = 15.7405
N_pm := ceil(N_pm)
N_pm = 16
# The largest gear with a specified pinion that is interference-free is
N_g := (N_pm^2*sin(ψ*deg)^2 - 4*k^2)/(4*k - 2*N_pm*sin(ψ*deg)^2)
N_g = 101.072
# The smallest spur pinion that will operate with a rack without interference is
N_p := 2*k/sin(ψ*deg)^2
N_p = 17.0973
N_p := ceil(N_p)
N_p = 18
