# Goodman's failure criteria
K_fs := 1.37
M_a := 1260 in*lbf
M_m := 0 in*lbf
S_ut := 105*10^3 psi
S_e := 29300*psi
d := 1.1 in
T_m := 1100 in*lbf
K_f := 1.58
T_a := 0 in*lbf
n := 1/(16/(π*d^3)*((1/S_e)*((4*(K_f*M_a)^2) + (3*(K_fs*T_a)^2))^0.5 + 1/S_ut*[4*(K_f*M_m)^2 + 3*(K_fs*T_m)^2]^0.5))
n = [1.62576]
