l := 50.8
d := 31.75
y_∞ := 0.9
y_1 := 0.58
y_0.5 := 0.36
y_0.25 := 0.18
y := 1/(l/d)^3*(-1/8*(1 - l/d)*(1 - 2*l/d)*(1 - 4*l/d)*y_∞ + 1/3*(1 - 2*l/d)*(1 - 4*l/d)*y_1 - 1/4*(1 - l/d)*(1 - 4*l/d)*y_0.5 + 1/24*(1 - l/d)*(1 - 2*l/d)*y_0.25)
y = 0.687744
