# When the clamped materials are different
E := 30*10^6*psi
d := 0.5 in
t := 0.595 in
D_w := 1.5*d
l := 1 in
# Frustum Diameter.
T := 0.595 in  # Thickness of a single frustum
D_f := 2*T*tan(30*deg) + D_w = 1.43705 in  # Diameter of frustum
k_m := 0.5774*π*E*d/ln((1.155*t + D_w - d)*(D_w + d)/((1.155*t + D_w + d)*(D_w - d)))
k_m = 30802457 lbf/in
# When the material is the same
l := 1 in
d := 0.5 in
t := 0.6725*in
l := 2*t = 1.345 in
E := 30*10^6*psi
k_m := 0.5774*π*E*d/(2*ln(5*(0.5774*l + 0.5*d)/(0.5774*l + 2.5*d)))
k_m = 14639186 lbf/in
