d_m := 28 mm
l := 4 mm
d_c := 48 mm
f := 0.12
F := 7500 N
f_c := 0.1
# Torque at collar
T_C := (F*f_c*d_c/2)
T_C = 18 J
# remember that Dc is
#
# Do+Din/2
# Torque required to raise the load
T_R := F*d_m/2*((l + π*f*d_m)/(π*d_m - f*l)) + T_C
T_R = 35.47 N*m
# Torque required to lower the load
T_L := F*d_m/2*((π*f*d_m - l)/(π*d_m + f*l)) + T_C
T := F*d_m/2*((l + π*f*d_m)/(π*d_m - f*l)) = 17.47 J
T_L = 25.7829 N*m
# Torque with zero  friction
T_o := F*l/(2*π)
T_o = 4.77465 N*m
# Efficiency
T_T := T_R
e := T_o/T_T
e = 0.134611
