S_ut := 690  # MPa
r := 3
K_t := 1.65
K_ts := 2.2
a := 1.24 - 2.25*10^-3*S_ut + 1.60*10^-6*S_ut^2 - 4.11*10^-10*S_ut^3  # for bending or axial
a = 0.314243
as := 0.958 - 1.83*10^-3*S_ut + 1.43*10^-6*S_ut^2 - 4.11*10^-10*S_ut^3  # for Torsion
as = 0.241106
q := 1/(1 + a/sqrt(r)) = 0.846433
qs := 1/(1 + as/sqrt(r)) = 0.877807
K_f := 1 + q*(K_t - 1) = 1.55018
K_fs := 1 + qs*(K_ts - 1) = 2.05337
