# Forced vibration equations and initial values for an underdamped case
X := 0.133 m
w_d := 2.975 rad/s
x_0 := 0.05 m
θ := 0.013 rad
F_0 := 1000 N
v_0 := 0 m/s
w_n := 10 rad/s
ζ := 0.01
w := 5*rad/s
m := 100 kg
f_0 := F_0/m = 10 N/kg
# Magnitude of phi in an underdamped forced vibration
ψ := atan(w_d*(x_0 - X*cos(θ))/(v_0 + (x_0 - X*cos(θ))*ζ*w_n - w*X*sin(θ))) = 1.50228 rad
A := w_d*(x_0 - X*cos(θ)) = -0.246892 m/s
B := v_0 + (x_0 - X*cos(θ))*ζ*w_n - w*X*sin(θ) = -0.0169436 m/s
# Magnitude of "A" in an underdamped forced vibration
A := (x_0 - X*cos(θ))/sin(ψ) = -0.083184 m
# Max Amplitude of forced response(damped condition)
X := f_0/sqrt((w_n^2 - w^2)^2 + (2*ζ*w_n*w)^2) = 0.133321 m
# phase shift of forced Amplitude
θ := atan(2*ζ*w_n*w/(w_n^2 - w^2)) = 0.0133325 rad
