M_a := 1260 in*lbf
T_m := 1100 in*lbf
d := 1.1 in
T_a := 0 in*lbf
M_m := 0 in*lbf
K_fs := 1.37
S_y := 82000 psi
K_f := 1.58
σ_max := [(32*K_f*(M_m + M_a)/(π*d^3))^2 + 3*(16*K_fs*(T_m + T_a)/(π*d^3))^2]^0.5
n_y := S_y/σ_max
n_y = [4.50123]
σ_max = [18217.2] psi
