d := 14 mm
E := 205*10^9 N/mm^2
l := 90 mm
L_T := 34 mm
L := 100 mm
A_d := π*d^2/4
A_d = 153.938 mm^2
A_t := 155 mm^2
l_d := L - L_T = 66 mm
l_d = 66 mm
l_t := l - l_d = 24 mm
l_t = 0.944882 in
K_b := A_d*A_t*E/(A_d*l_t + A_t*l_d)
K_b = 3.51278e14 N/m
