h := 0.25 in
r := 1.5 in
J_u := 2*π*r^3
J := 0.707*h*J_u
A := 1.414*π*h*r
d := 8 in
τ := 20000 psi
F := 2*sqrt(τ^2*A^2*J^2/(J^2 + (A*d*r)^2)) = 120423 m/s^2*lb
# the "2" accounts for both welded sides because 'F' on each side is half the total load
